<?xml version="1.0" encoding="UTF-8"?>
<channelml xmlns="http://morphml.org/channelml/schema"
    xmlns:xsi="http://www.w3.org/2001/XMLSchema-instance"
    xmlns:meta="http://morphml.org/metadata/schema"
    xsi:schemaLocation="http://morphml.org/channelml/schema  http://www.neuroml.org/NeuroMLValidator/NeuroMLFiles/Schemata/v1.8.1/Level2/ChannelML_v1.8.1.xsd"
    units="Physiological Units">

    <meta:notes>A channel from Maex, R and De Schutter, E. Synchronization of Golgi and Granule Cell Firing in a
    Detailed Network Model of the Cerebellar Granule Cell Layer</meta:notes>

    <channel_type name="CaHVA">

        <status value="stable">
            <meta:comment>Comment in original mod: Based on MS(98)</meta:comment>
            <meta:issue>Comment from orig mod file:
                if (alp_h > 0.005){
                    alp_h = 0.005
                } : Consult RM on &lt; or &gt;</meta:issue>
            <meta:contributor>
                <meta:name>Padraig Gleeson</meta:name>
            </meta:contributor>
        </status>

        <meta:notes>A High Voltage Activated Ca2+ channel</meta:notes>

        <meta:authorList>
            <meta:modelAuthor>
                <meta:name>Volker Steuber</meta:name>
            </meta:modelAuthor>
            <meta:modelAuthor>
                <meta:name>Chiara Saviane</meta:name>
            </meta:modelAuthor>
          <meta:modelTranslator>
            <meta:name>Padraig Gleeson</meta:name>
            <meta:institution>UCL</meta:institution>
            <meta:email>p.gleeson - at - ucl.ac.uk</meta:email>
          </meta:modelTranslator>
        </meta:authorList>

        <meta:publication>
           <meta:fullTitle>Maex, R and De Schutter, E.
           Synchronization of Golgi and Granule Cell Firing in a Detailed Network Model of the
           cerebellar Granule Cell Layer. J Neurophysiol, Nov 1998; 80: 2521 - 2537</meta:fullTitle>
           <meta:pubmedRef>http://www.ncbi.nlm.nih.gov/entrez/query.fcgi?cmd=Retrieve&amp;db=PubMed&amp;list_uids=9819260&amp;dopt=Abstract</meta:pubmedRef>
        </meta:publication>

        <meta:neuronDBref>
           <meta:modelName>Calcium channels</meta:modelName>
           <meta:uri>http://senselab.med.yale.edu/senselab/NeuronDB/channelGene2.htm#table1</meta:uri>
        </meta:neuronDBref>

        <parameters>
            <parameter name="shift" value ="-10"/> <!-- Will be overwritten when placed on cell-->
        </parameters>

        <current_voltage_relation cond_law="ohmic"
                                  ion="ca"
                                  default_gmax=".9"
                                  default_erev="80"
                                  charge="2">

            <gate name="m" instances="2">
                <closed_state id="m0"/>
                <open_state id="m" fraction="1"/>

                <transition name="alpha" from="m0" to="m" expr_form="generic" expr="8 / (1 + (exp (((v+shift) - (5))/-13.9)))"/>

                <transition name="beta" from="m" to="m0" expr_form="generic" expr="0.5*(((v+shift)-(-8.9))/(-5)) / (1 - (exp (-1 * ((v+shift)-(-8.9))/(-5)) ) )"/>

            </gate>

            <gate name="h" instances="1">
                <closed_state id="h0"/>
                <open_state id="h" fraction="1"/>

                <transition name="alpha" from="h0" to="h" expr_form="generic" expr="(v+shift) &lt; -27.8112417 ? 0.005 : 0.025 * (exp (-0.05 * ((v+shift) - (-60))))" />

                <transition name="beta" from="h" to="h0" expr_form="generic" expr="(v+shift) &lt; -60 ? 0 : 0.025 - (0.025 * (exp (-0.05 * ((v+shift) - (-60)))))" />

            </gate>
        </current_voltage_relation>

        <impl_prefs>
            <comment>Note, Using the NEURON mod file impl settings to get a closer match</comment>
            <table_settings max_v="100" min_v="-100" table_divisions="200"/>
        </impl_prefs>

    </channel_type>
</channelml>
