<?xml version="1.0" encoding="UTF-8"?>

<channelml xmlns="http://morphml.org/channelml/schema"
		xmlns:xsi="http://www.w3.org/2001/XMLSchema-instance"
		xmlns:meta="http://morphml.org/metadata/schema"
        xsi:schemaLocation="http://morphml.org/channelml/schema  http://www.neuroml.org/NeuroMLValidator/NeuroMLFiles/Schemata/v1.8.1/Level2/ChannelML_v1.8.1.xsd"
		units="Physiological Units">

    <meta:notes>ChannelML file containing a single Channel description</meta:notes>

    <channel_type name="GranCellPassiveCond" density="yes">

        <status value="stable"/>

        <meta:notes>Passive membrane conductance for Granule Cell</meta:notes>

        <meta:authorList>
            <meta:modelTranslator>
                <meta:name>Padraig Gleeson</meta:name>
                <meta:institution>UCL</meta:institution>
                <meta:email>p.gleeson - at - ucl.ac.uk</meta:email>
            </meta:modelTranslator>
        </meta:authorList>

        <current_voltage_relation cond_law="ohmic" ion="non_specific" default_gmax="0.3" default_erev="-60"/>    <!-- gmax units: mS/cm2-->

    </channel_type>

</channelml>
