<?xml version="1.0" encoding="UTF-8"?>
<channelml xmlns="http://morphml.org/channelml/schema"
           xmlns:xsi="http://www.w3.org/2001/XMLSchema-instance"
           xmlns:meta="http://morphml.org/metadata/schema"
           xsi:schemaLocation="http://morphml.org/channelml/schema   http://www.neuroml.org/NeuroMLValidator/NeuroMLFiles/Schemata/v1.8.1/Level2/ChannelML_v1.8.1.xsd"
           units="Physiological Units">

    <meta:notes>A channel from a granule cell model developed by Volker Steuber and Chiara Saviane</meta:notes>

    <channel_type name="KA" density="yes">

      <status value="stable">
            <meta:comment>From orig mod file: Based on MS(98)</meta:comment>
            <meta:comment>Missing temp varying Q10 info which had been in MDeS 98</meta:comment>
            <meta:issue>Note: no shift used in expression for tau h !!! Was missing in original mod file!!</meta:issue>
            <meta:issue>minf and hinf are multiplied by the q10 factor in orig mods! (Reflected here with 5* inc in A values)</meta:issue>
            <meta:issue>tau expressions multiplied by Q10 factor (5) instead of divided by it. Factor of 25 introduced in taus to fix this</meta:issue>
            <meta:issue>See note on tau expression for h gate regarding shift</meta:issue>
            <meta:contributor>
                <meta:name>Padraig Gleeson</meta:name>
            </meta:contributor>
        </status>

        <meta:notes>A type K+ channel</meta:notes>

        <meta:authorList>
            <meta:modelAuthor>
                <meta:name>Volker Steuber</meta:name>
            </meta:modelAuthor>
            <meta:modelAuthor>
                <meta:name>Chiara Saviane</meta:name>
            </meta:modelAuthor>
          <meta:modelTranslator>
            <meta:name>Padraig Gleeson</meta:name>
            <meta:institution>UCL</meta:institution>
            <meta:email>p.gleeson - at - ucl.ac.uk</meta:email>
          </meta:modelTranslator>
        </meta:authorList>

        <meta:publication>
           <meta:fullTitle>Maex, R and De Schutter, E.
           Synchronization of Golgi and Granule Cell Firing in a Detailed Network Model of the
           cerebellar Granule Cell Layer. J Neurophysiol, Nov 1998; 80: 2521 - 2537</meta:fullTitle>
           <meta:pubmedRef>http://www.ncbi.nlm.nih.gov/entrez/query.fcgi?cmd=Retrieve&amp;db=PubMed&amp;list_uids=9819260&amp;dopt=Abstract</meta:pubmedRef>
        </meta:publication>

        <meta:publication>
            <meta:fullTitle>Berends, Michiel, Maex, Reinoud, De Schutter, Erik.
            The Effect of NMDA Receptors on Gain Modulation.
            Neural Comp. 2005 17: 2531-2547</meta:fullTitle>
          <meta:pubmedRef>http://www.ncbi.nlm.nih.gov/entrez/query.fcgi?cmd=Retrieve&amp;db=PubMed&amp;list_uids=16212761&amp;dopt=Abstract</meta:pubmedRef>
        </meta:publication>

        <meta:neuronDBref>
            <meta:modelName>K channels</meta:modelName>
            <meta:uri>http://senselab.med.yale.edu/senselab/NeuronDB/channelGene2.htm#table3</meta:uri>
        </meta:neuronDBref>

        <parameters>
            <parameter name="shift" value ="-10"/> <!-- Will be overwritten when placed on cell-->
        </parameters>

        <current_voltage_relation cond_law="ohmic" ion="k" default_gmax="4" default_erev="-84.7">

            <q10_settings fixed_q10="5" experimental_temp="37"/>

            <gate name="m" instances="3">
                <closed_state id="m0"/>
                <open_state id="m" fraction="1"/>

                <time_course name="tau" from="m0" to="m" expr_form="generic" expr="25*(0.082 * ((exp (( ((v + shift) + 43.5) / (-42.8))))) + 0.0334)" />

                <steady_state name="inf" from="m0" to="m" expr_form="generic" expr="1 / (1 + (exp (((v + shift)- (-46.7))/-19.8)) )" />

            </gate>

            <gate name="h" instances="1">
                <closed_state id="h0"/>
                <open_state id="h" fraction="1"/>

                <!--Note: no shift used in tau h !!!-->
                <time_course name="tau" from="h0" to="h" expr_form="generic" expr="25*(2.16 + (0.006 * v) + (0.2 / (57.9 * (exp (v *0.127)) + (134e-6 * (exp (v * -0.059))))))" />

                <steady_state name="inf" from="h0" to="h" expr_form="generic" expr="1 / (1 + (exp (((v + shift)- (-78.8))/8.4)) )" />

            </gate>
        </current_voltage_relation>

        <impl_prefs>
            <table_settings max_v="100" min_v="-100" table_divisions="200"/>
        </impl_prefs>

    </channel_type>
</channelml>
