<?xml version="1.0" encoding="UTF-8"?>
<channelml xmlns="http://morphml.org/channelml/schema"
           xmlns:xsi="http://www.w3.org/2001/XMLSchema-instance"
           xmlns:meta="http://morphml.org/metadata/schema"
           xsi:schemaLocation="http://morphml.org/channelml/schema  http://www.neuroml.org/NeuroMLValidator/NeuroMLFiles/Schemata/v1.8.1/Level2/ChannelML_v1.8.1.xsd"
           units="Physiological Units">

    <meta:notes>A channel from a granule cell model developed by Volker Steuber and Chiara Saviane, originally from Berends et al 2005</meta:notes>

    <channel_type name="NaP">

      <status value="stable">
            <meta:comment>Comment in orig mod file: Based on D'Angelo (2001)</meta:comment>
            <meta:issue>Comment in orig mod file: Special infinity values still to be implemented</meta:issue>
            <meta:contributor>
                <meta:name>Padraig Gleeson</meta:name>
            </meta:contributor>
        </status>

        <meta:notes>Persistent Na current, described in D'Angelo 2001, implemented in Berends et al 2005</meta:notes>

        <meta:authorList>
            <meta:modelAuthor>
                <meta:name>Volker Steuber</meta:name>
            </meta:modelAuthor>
            <meta:modelAuthor>
                <meta:name>Chiara Saviane</meta:name>
            </meta:modelAuthor>
          <meta:modelTranslator>
            <meta:name>Padraig Gleeson</meta:name>
            <meta:institution>UCL</meta:institution>
            <meta:email>p.gleeson - at - ucl.ac.uk</meta:email>
          </meta:modelTranslator>
        </meta:authorList>

        <meta:publication>
            <meta:fullTitle>Berends, Michiel, Maex, Reinoud, De Schutter, Erik.
            The Effect of NMDA Receptors on Gain Modulation.
            Neural Comp. 2005 17: 2531-2547</meta:fullTitle>
          <meta:pubmedRef>http://www.ncbi.nlm.nih.gov/entrez/query.fcgi?cmd=Retrieve&amp;db=PubMed&amp;list_uids=16212761&amp;dopt=Abstract</meta:pubmedRef>
        </meta:publication>

        <meta:publication>
          <meta:fullTitle>D'Angelo E, Nieus T, Maffei A, Armano S, Rossi P, Taglietti V, Fontana A, Naldi G.
            Theta-frequency bursting and resonance in cerebellar granule cells: experimental evidence and modeling of a slow k+-dependent mechanism.
            J Neurosci. 2001 Feb 1;21(3):759-70.</meta:fullTitle>
          <meta:pubmedRef>http://www.ncbi.nlm.nih.gov/sites/entrez?cmd=retrieve&amp;db=pubmed&amp;list_uids=11157062&amp;dopt=Abstract</meta:pubmedRef>
        </meta:publication>

        <meta:neuronDBref>
            <meta:modelName>Na channels</meta:modelName>
            <meta:uri>http://senselab.med.yale.edu/senselab/NeuronDB/channelGene2.htm#table2</meta:uri>
        </meta:neuronDBref>

        <current_voltage_relation cond_law="ohmic" ion="na" default_gmax="0.02" default_erev="87.4">

            <q10_settings fixed_q10="1" experimental_temp="37"/>

            <gate name="m" instances="1">
                <closed_state id="m0"/>
                <open_state id="m"/>

                <transition name="alpha" from="m0" to="m" expr_form="exp_linear" rate="0.455" scale="5" midpoint="-42" />

                <transition name="beta" from="m" to="m0" expr_form="exp_linear" rate="0.31" scale="-5" midpoint="-42" />

                <time_course name="tau" from="m0" to="m" expr_form="generic" expr="5/(alpha + beta)" />

                <steady_state name="inf" from="m0" to="m" expr_form="sigmoid" rate="1" scale="-5" midpoint="-42" />

            </gate>
        </current_voltage_relation>

    </channel_type>
</channelml>
